*Heading
** Job name: swaging_t2 Model name: Model-1
** Generated by: Abaqus/CAE 2018
*Preprint, echo=NO, model=NO, history=NO, contact=NO
**
** PARTS
**
*Part, name=housing
*Node
      1,   13.8900003,   25.2956905
      2,   17.3649998,   25.2956905
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*Element, type=CAX3
1, 341, 338, 328
2, 317, 310, 301
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*Element, type=CAX4R
  4, 292, 362, 298, 296
  5, 221, 218, 197, 190
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*Nset, nset=_PickedSet3, internal, generate
    1,  1801,     1
*Elset, elset=_PickedSet3, internal, generate
    1,  1743,     1
** Section: housing_section
*Solid Section, elset=_PickedSet3, material=housing_mat
,
*End Part
**
*Part, name=inner_ball
*Node
      1,   7.14499998,           0.
      2,   8.50899982,           0.
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*Element, type=CAX3
1, 481, 463, 466
2, 465, 460, 452
3, 363, 474, 367
*Element, type=CAX4R
  4,  54, 177, 125,  55
  5, 168, 255,  94,  17
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*Nset, nset=_PickedSet2, internal, generate
   1,  481,    1
*Elset, elset=_PickedSet2, internal, generate
   1,  435,    1
** Section: bear_section
*Solid Section, elset=_PickedSet2, material=bear_mat
,
*End Part
**
*Part, name=outer_race
*Node
      1,   13.8900003,   9.90999985
      2,   10.7522411,   9.90999985
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*Element, type=CAX3
 1, 443, 252, 444
 2, 460, 258, 238
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*Element, type=CAX4R
 10, 466, 469, 278, 270
 11, 232, 227,  20,  21
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*Nset, nset=_PickedSet2, internal, generate
    1,  1387,     1
*Elset, elset=_PickedSet2, internal, generate
    1,  1309,     1
** Region: (bear_section:Picked), (Controls:Default)
*Elset, elset=_I1, internal
   1,   2,   3,   4,   5,   6
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** Section: bear_section
*Solid Section, elset=_I1, material=bear_mat
,
** Region: (bear_section:Picked), (Controls:EC-1)
*Elset, elset=_I2, internal
   10,   11,   12,   13,   14,   15
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** Section: bear_section
*Solid Section, elset=_I2, controls=EC-1, material=bear_mat
,
*End Part
**
*Part, name=roller
*Node
      1,   12.3199997,   37.4007835
      2,   10.5956278,   41.0987129
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*Element, type=RAX2
 1,  1,  7
 2,  7,  8
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*Node
    109,   12.1850004,   45.3687134,           0.
*Nset, nset=roller-RefPt_, internal
109,
*Elset, elset=roller, generate
   1,  108,    1
*End Part
**
**
** ASSEMBLY
**
*Assembly, name=Assembly
**
*Instance, name=housing-1, part=housing
          0.,   -16.085691,           0.
*End Instance
**
*Instance, name=inner_ball-1, part=inner_ball
*End Instance
**
*Instance, name=outer_race-1, part=outer_race
*End Instance
**
*Instance, name=roller-1, part=roller
          0.,   -24.115785,           0.
*End Instance
**
*Nset, nset=_PickedSet19, internal, instance=outer_race-1
  3,  4,  6,  7, 67, 68, 69, 70, 77
*Elset, elset=_PickedSet19, internal, instance=outer_race-1
  47,  48,  65,  71,  72, 214, 226
*Nset, nset=_PickedSet20, internal, instance=inner_ball-1
  1, 13, 54, 55, 56, 57
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*Elset, elset=_PickedSet20, internal, instance=inner_ball-1
   4,  16,  51,  52,  53,  56
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*Nset, nset=_PickedSet31, internal, instance=housing-1
   7,   8,  82,  83,  84,  85
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*Elset, elset=_PickedSet31, internal, instance=housing-1
 285, 286, 288, 348, 356, 364
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*Nset, nset=_PickedSet32, internal, instance=housing-1
   8,   9, 120, 121, 122, 123
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*Elset, elset=_PickedSet32, internal, instance=housing-1
 514, 518, 520, 525, 526, 528
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*Nset, nset=_PickedSet33, internal, instance=roller-1
 109,
*Elset, elset=__PickedSurf21_S2, internal, instance=inner_ball-1
   6,  48,  90, 104, 105, 111
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*Elset, elset=__PickedSurf21_S4, internal, instance=inner_ball-1
   8,  11,  18,  20,  23,  28
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*Elset, elset=__PickedSurf21_S1, internal, instance=inner_ball-1
 17,
*Surface, type=ELEMENT, name=_PickedSurf21, internal
__PickedSurf21_S2, S2
__PickedSurf21_S4, S4
__PickedSurf21_S1, S1
*Elset, elset=__PickedSurf22_S1, internal, instance=outer_race-1
  16,  47,  52,  64, 174, 185, 187, 211, 212, 215
*Elset, elset=__PickedSurf22_S2, internal, instance=outer_race-1
  21,  62, 122, 183, 387, 480
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*Elset, elset=__PickedSurf22_S3, internal, instance=outer_race-1
  49,  51,  63,  67,  77, 108, 166, 181, 182, 207
*Elset, elset=__PickedSurf22_S4, internal, instance=outer_race-1
 331, 478, 481, 525, 533, 534, 551, 553, 739, 777, 779, 781
*Surface, type=ELEMENT, name=_PickedSurf22, internal
__PickedSurf22_S1, S1
__PickedSurf22_S2, S2
__PickedSurf22_S4, S4
__PickedSurf22_S3, S3
*Elset, elset=__PickedSurf24_S3, internal, instance=outer_race-1
  15,  86, 163, 179, 197, 456
*Elset, elset=__PickedSurf24_S2, internal, instance=outer_race-1
  20,  53,  54,  72,  75,  76
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*Elset, elset=__PickedSurf24_S4, internal, instance=outer_race-1
  69,  79, 177, 199, 372, 417, 748, 798
*Elset, elset=__PickedSurf24_S1, internal, instance=outer_race-1
 191, 194
*Surface, type=ELEMENT, name=_PickedSurf24, internal
__PickedSurf24_S3, S3
__PickedSurf24_S2, S2
__PickedSurf24_S4, S4
__PickedSurf24_S1, S1
*Elset, elset=__PickedSurf26_S2, internal, instance=outer_race-1
 418, 420, 457, 765, 786
*Elset, elset=__PickedSurf26_S4, internal, instance=outer_race-1
 456, 490, 723, 754, 755, 757, 766
*Elset, elset=__PickedSurf26_S1, internal, instance=outer_race-1
 355, 356, 371, 408, 409, 463
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*Elset, elset=__PickedSurf26_S3, internal, instance=outer_race-1
 462, 491, 533, 690, 760, 761, 763, 764, 767, 768, 772, 773, 819, 842, 854
*Surface, type=ELEMENT, name=_PickedSurf26, internal
__PickedSurf26_S2, S2
__PickedSurf26_S4, S4
__PickedSurf26_S1, S1
__PickedSurf26_S3, S3
*Elset, elset=__PickedSurf28_S3, internal, instance=housing-1
 20, 25, 26, 34, 36, 39, 40, 42, 43, 45, 47, 48, 56, 94
*Elset, elset=__PickedSurf28_S1, internal, instance=housing-1
   8,  37,  44,  46,  66,  80, 225, 379, 792
*Elset, elset=__PickedSurf28_S4, internal, instance=housing-1
  41,  59, 383, 390, 793, 798, 799, 801, 803
*Elset, elset=__PickedSurf28_S2, internal, instance=housing-1
 340, 349, 357, 365, 372, 387, 389, 789, 846, 849, 853, 856, 858, 860, 861
*Surface, type=ELEMENT, name=_PickedSurf28, internal
__PickedSurf28_S3, S3
__PickedSurf28_S1, S1
__PickedSurf28_S4, S4
__PickedSurf28_S2, S2
*Elset, elset=__PickedSurf35_SPOS, internal, instance=roller-1, generate
  1,  17,   1
*Elset, elset=__PickedSurf35_SNEG, internal, instance=roller-1, generate
  68,  108,    1
*Surface, type=ELEMENT, name=_PickedSurf35, internal
__PickedSurf35_SPOS, SPOS
__PickedSurf35_SNEG, SNEG
*Rigid Body, ref node=roller-1.roller-RefPt_, elset=roller-1.roller
*End Assembly
**
** ELEMENT CONTROLS
**
*Section Controls, name=EC-1, hourglass=ENHANCED
1., 1., 1.
**
** MATERIALS
**
*Material, name=bear_mat
*Density
 7.8e-09,
*Elastic
21000., 0.27
*Plastic
840.,0.
*Material, name=housing_mat
*Density
 4.8e-09,
*Elastic
110000., 0.3
**
** INTERACTION PROPERTIES
**
*Surface Interaction, name=high
*Friction
 0.17,
*Surface Behavior, pressure-overclosure=HARD
*Surface Interaction, name=low
*Friction
 0.01,
*Surface Behavior, pressure-overclosure=HARD
**
** BOUNDARY CONDITIONS
**
** Name: BC-3 Type: Displacement/Rotation
*Boundary
_PickedSet19, 2, 2
** Name: BC-4 Type: Displacement/Rotation
*Boundary
_PickedSet20, 1, 1
** Name: BC-5 Type: Displacement/Rotation
*Boundary
_PickedSet31, 2, 2
** Name: BC-6 Type: Displacement/Rotation
*Boundary
_PickedSet32, 1, 1
** ----------------------------------------------------------------
**
** STEP: Step-1
**
*Step, name=Step-1, nlgeom=YES
*Dynamic, Explicit
, 0.1
*Bulk Viscosity
0.06, 1.2
** Mass Scaling: Semi-Automatic
**               Whole Model
*Fixed Mass Scaling, factor=4.
**
** BOUNDARY CONDITIONS
**
** Name: BC-1 Type: Velocity/Angular velocity
*Boundary, type=VELOCITY
_PickedSet33, 1, 1
_PickedSet33, 2, 2, -20.
_PickedSet33, 6, 6
**
** INTERACTIONS
**
** Interaction: Int-1
*Contact Pair, interaction=low, mechanical constraint=KINEMATIC, cpset=Int-1
_PickedSurf21, _PickedSurf22
** Interaction: Int-2
*Contact Pair, interaction=high, mechanical constraint=KINEMATIC, cpset=Int-2
_PickedSurf28, _PickedSurf24
** Interaction: Int-3
*Contact Pair, interaction=high, mechanical constraint=KINEMATIC, cpset=Int-3
_PickedSurf35, _PickedSurf26
**
** OUTPUT REQUESTS
**
*Restart, write, number interval=1, time marks=NO
**
** FIELD OUTPUT: F-Output-1
**
*Output, field, variable=PRESELECT, number interval=100
**
** HISTORY OUTPUT: H-Output-1
**
*Output, history, variable=PRESELECT
*End Step
